# задание 1
x := 2
n := 5
y := (sqrt(x^3 + n) + cos(|n*x - 1|)^2)/(nthroot(x^5 + sin(x) + n, 4)*cos((x + n)*π/4))
y = 2.52809
# задание 2
x := 7
y := 10
z := -3
p(x, y, z) := if(x > y, sin(x) + 2*|y| - z^2, (y + 3)*ln(x + 1)/sqrt(z^2 + 1))
p(x, y, z) = 8.5485
q(x, y, z) := if((x > y) and (x < 1), cos(x) + 2*|y + 1| - z, (x*y + 3)/sqrt(y^2 + 5))
q(x, y, z) = 7.12407
w(x, y, z) := if((x < y) or (y ≥ 10), x^2 + 2*(x*y + 1) - z, (x^-3*y^2 + 3)*sqrt(z^2 + 7))
w(x, y, z) = 194
# задание 3
x := -2, -1.6 .. 2
n := 5
f(x) := (x^2 - n*x + sin(x))*sqrt(|x - cos(n*x)|)
x = [-2; -1.6; -1.2; -0.8; -0.4; 0; 0.4; 0.8; 1.2; 1.6; 2]
f(x) = [14.1048; 11.5301; 9.56509; 1.50067; 0.224988; 0; -1.31047; -3.18616; -1.7767; -5.86657; -8.5776]
# задание 4
n := 5
a := -3*n
b := 3*n
A := runif(3, a, b) = [-14.9619; -9.20031; 2.55018]
B := runif(3, a, b) = [-4.49076; 9.68513; -9.77613]
C := runif(3, a, b) = [6.31486; -5.88042; -12.2577]
s := (A[0]*B[0] + A[1]*B[1] + A[2]*B[2]) = -46.8467
s := A*B = -46.8467
Bazis := [i, j, k; B[0], B[1], B[2]; C[0], C[1], C[2]]  # error: This variable is undefined.
V := B×C = [-176.205; -116.781; -34.7527]
V := [B[1]*C[2] - B[2]*C[1]; B[2]*C[0] - B[0]*C[2]; B[0]*C[1] - B[1]*C[0]] = [-176.205; -116.781; -34.7527]
w := (A×B)*C = 3622.16
V := A×B
al := sqrt(A*A) = 17.7485
bl := sqrt(B*B) = 14.4755
w := V[0]*C[0] + V[1]*C[1] + V[2]*C[2] = 3622.16
cl := sqrt(C*C) = 14.9902
max := if(al > bl and al > cl, "Это А", "Это не A") = "Это А"
max := if(bl > al and bl > cl, "Это B", "Это не B") = "Это не B"
max := if(cl > bl and cl > al, "Это C", "Это не C") = "Это не C"
-10 + round(rnd(20), 3)
iter1 := 0, 1 .. 10
iter2 := 0, 1 .. 10
M[iter1, iter2] = -10 + round(rnd(20), 3)  # error: This variable is undefined.
M[iter1, iter2] := -10 + floor(rnd(20))
M[10, 10] := 10
M = [
    -6, 5, 3, 5, 6, -1, -9, -3, -2, -5, 4;
    -9, -3, -7, -8, -7, -6, -4, 3, 8, -8, 1;
    7, 7, -3, 3, -5, 9, 1, -8, 2, -3, -1;
    8, 9, 0, 7, -4, 1, -4, -5, 8, 6, 3;
    5, 4, -4, -1, 6, 0, 1, 2, 5, -7, 5;
    -2, 0, -9, 9, 2, -3, 7, -6, -9, -7, -6;
    5, -9, -8, 1, 2, -1, -4, -5, 7, 7, 5;
    2, 1, -7, -6, -6, -2, -5, -3, -6, 2, -3;
    9, 7, 9, -6, -3, -5, -9, 4, 3, -10, 2;
    -5, 4, 8, 2, 5, 0, -3, -8, -10, -5, -6;
    7, -10, -9, -9, 9, 7, -2, 3, 8, -10, 10
]
sum(sum(M[iter1, iter2], iter2), iter1) = -59
Mpos[iter1, iter2] := if(M[iter1, iter2] > 0, M[iter1, iter2], 0)
sum(sum(Mpos[iter1, iter2], iter2), iter1) = 281  # положительные
Mneg[iter1, iter2] := if(M[iter1, iter2] < 0, M[iter1, iter2], 0)
sum(sum(Mneg[iter1, iter2], iter2), iter1) = -340  # отрицательные
X := M[:, 0]
Y := transpose(transpose(M)[:, 10])
Y = [7, -10, -9, -9, 9, 7, -2, 3, 8, -10, 10]
X = [-6; -9; 7; 8; 5; -2; 5; 2; 9; -5; 7]
Y*X = 132
# задание 5
x := -3*π .. 3*π
y(x) := e^(-(|x|/3))*cos(x)
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# задание 6
x := -9, -9 + 0.25 .. 9
f(x) := if(x < 0, e^x*x^3, e^(-x)*x^3)
x = [
    -9; -8.75; -8.5; -8.25; -8; -7.75; -7.5; -7.25; -7; -6.75
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]
f(x) = [
    -0.0899657; -0.106157; -0.124955; -0.146701; -0.171757; -0.200504; -0.233332; -0.270632; -0.312776; -0.3601
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]
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g(x) := sqrt(|x|)*sin(x)
x1 := -2*π
x2 := 2*π
Δx := π/4
Nx := (x2 - x1)/Δx = 16
i := 0 .. Nx
x[i] := x1 + i*Δx
X[i] := x[i]
V[i] := g(x[i])
X[i] = [-6.28319; -5.49779; -4.71239; -3.92699; -3.14159; -2.35619; -1.5708; -0.785398; 0; 0.785398; 1.5708; 2.35619; 3.14159; 3.92699; 4.71239; 5.49779; 6.28319]
V[i] = [0; 1.65798; 2.1708; 1.40125; 0; -1.0854; -1.25331; -0.626657; 0; 0.626657; 1.25331; 1.0854; 0; -1.40125; -2.1708; -1.65798; 0]
WRITEPRN("X.txt") := X
WRITEPRN("V.txt") := V
XX := READPRN("X.txt")
VV := READPRN("V.txt")
XX = [-6.283; -5.498; -4.712; -3.927; -3.142; -2.356; -1.571; -0.7854; 0; 0.7854; 1.571; 2.356; 3.142; 3.927; 4.712; 5.498; 6.283]
VV = [0; 1.658; 2.171; 1.401; 0; -1.085; -1.253; -0.6267; 0; 0.6267; 1.253; 1.085; 0; -1.401; -2.171; -1.658; 0]
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# задание 8
x := -3, -2.9 .. 3
q(x) := e^(-x^2)
p(x) := d/dx(q(x))
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# задание 9
x := -15 .. 15
y := -15 .. 15
f(x, y) := sin(sqrt(x^2 + y^2))/sqrt(x^2 + y^2)
# [component: inputs f]
# задание 10
f(x) := x^2 + (x - 2)*sin(x) - 5
x1 := -5
x2 := 5
Δx := 0.1
x := x1, x1 + Δx .. x2
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x := -4
x1 := root(f(x), x)
x := 2
x1 = -1.32936
x2 := root(f(x), x)
f(x1) = 0
x2 = 2.19967
f(x2) = 3.52607e-13
# задание 11
x1 := -4
x2 := 4
Δx := 0.1
f(x) := x^2 + x*sin(2*x) - (x - 5)*cos(x)
x := x1, x1 + Δx .. x2
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x2 := root(f(x), x, -2, 0)
x1 := root(f(x), x, -4, -2)
x2 = -1.93283
x1 = -2.97354
f(x2) = 0
f(x1) = -1.77636e-15
# задание 12
n := 6
f(x) := x^3 + (4 - n)*x^2 + (3 - 4*n)*x - 3*n
V := [-3*n; 3 - 4*n; 4 - n; 1]
V = [-18; -21; -2; 1]
R := polyroots(V)
R = [-3; -1; 6]
# задание 13
n := 3
A := [n, n + 1, n + 2; n - 3, n - 2, n; n - 1, n, n + 1]
A = [3, 4, 5; 0, 1, 3; 2, 3, 4]
|A| = -1
B := [6*n + 8; 6*n - 7; 6*n + 2]
B = [26; 11; 20]
X := A^-1*B
x := X[0] = 1
A*X = [26; 11; 20]
y := X[1] = 2
X = [1; 2; 3]
z := X[2] = 3
Given
x := 0
y := 0
z := 0
n*x + (n + 1)*y + (n + 2)*z == 6*n + 8
(n - 3)*x + (n - 2)*y + n*z == 6*n - 7
(n - 1)*x + n*y + (n + 1)*z == 6*n + 2
[rx; ry; rz] := Find(x, y, z) = [1; 2; 3]
# задание 14
t := 0, 0.01 .. 2*π
x^2/81 + y^2/16 == 1
(x - 9)^2 + (y - 2)^2 == 25
xOkr(t) := 9 + 5*cos(t)
xEl(t) := 9*cos(t)
yOkr(t) := 2 + 5*sin(t)
yEl(t) := 4*sin(t)
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x := 5
y := 0
Given
x^2/81 + y^2/16 == 1
(x - 9)^2 + (y - 2)^2 == 25
V := Find(x, y)
V = [6.9308; -2.55175]
x := 6
y := 3
Given
x^2/81 + y^2/16 == 1
(x - 9)^2 + (y - 2)^2 == 25
V := Find(x, y)
V = [4.23934; 3.52845]
# задание 15
x := 0, 0.1 .. 10
f(x) := x*sin(x)
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x := 2
x1_max := Maximize(f, x)
x1_max = 2.02876
y1_max := f(x1_max)
y1_max = 1.81971
x := 5
x1_min := Minimize(f, x)
x1_min = 4.91318
y1_min := f(x1_min)
y1_min = -4.81447
x := 8
x2_max := Maximize(f, x)
x2_max = 7.97867
y2_max := f(x2_max)
y2_max = 7.91673
x := 9
x2_min := Minimize(f, x)
x2_min = 11.0855
y2_min := f(x1_min)
y2_min = -4.81447
x := 7
k := -3, -2.8 .. 3
tan(k) = [
    0.142547; 0.35553; 0.601597; 0.916014; 1.37382; 2.18504; 4.28626; 34.2325; -5.79788; -2.57215
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]
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