Xa := 4
Xb := 4
Xc := 6
Xd := 6
Ya := 2
Yb := 8
Yc := 7
Yd := 3
X := transpose([Xa, Xb, Xc, Xd, Xa])
Y := transpose([Ya, Yb, Yc, Yd, Ya])
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# ур. граф. продолжений сторон
[a; b] := line([Xd; Xa], [Yd; Ya])
[v; d] := line([Xb; Xc], [Yb; Yc])
Fda(x) := a + b*x
Fcb(x) := v + d*x
x := (v - a)/(b - d)
x = 10
# коорд. концов отрезков до пересечения
Xcl := x
Ycl := Fcb(Xcl)
Ycl = 5
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P := [10; 5]
# Смещение начала системы координат
T_s(dx, dy) := [1, 0, -dx; 0, 1, -dy; 0, 0, 1]
# Поворот объекта на угол ϕ = 90
ϕ := -90
R_o(ϕ) := [cos(ϕ), -sin(ϕ), 0; sin(ϕ), cos(ϕ), 0; 0, 0, 1]
ϕ_rad := ϕ*π/180
# Координаты вершин фигуры
Pc := [Xa, Xb, Xc, Xd, Xa; Ya, Yb, Yc, Yd, Ya; 1, 1, 1, 1, 1]
Pc = [4, 4, 6, 6, 4; 2, 8, 7, 3, 2; 1, 1, 1, 1, 1]
# Смещение системы координат относительно точки пересечения P
P1 := T_s(P[0], P[1])*Pc
P1 = [-6, -6, -4, -4, -6; -3, 3, 2, -2, -3; 1, 1, 1, 1, 1]
X1 := transpose(P1)[:, 0]
Y1 := transpose(P1)[:, 1]
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X1 = [-6; -6; -4; -4; -6]
Y1 = [-3; 3; 2; -2; -3]
# Поворачиваем трапецию (объект) на угол 90 град по часовой стрелке
P2 := R_o(ϕ_rad)*P1
X2 := transpose(P2)[:, 0]
Y2 := transpose(P2)[:, 1]
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# Смещаем систему координат в исходное положение
P3 := T_s(-P[0], -P[1])*P2
X3 := transpose(P3)[:, 0]
Y3 := transpose(P3)[:, 1]
# Устанавливаем новые диапазоны
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